<!-- A prefab declaring a beam, to be used in all examples matching FEMBAR-*.scn -->
<Node name="Group">
    <Node name="plugins">
        <RequiredPlugin name="Sofa.Component.Constraint.Projective"/> <!-- Needed to use components [FixedConstraint] -->
        <RequiredPlugin name="Sofa.Component.Engine.Select"/> <!-- Needed to use components [BoxROI] -->
        <RequiredPlugin name="Sofa.Component.Mass"/> <!-- Needed to use components [UniformMass] -->
        <RequiredPlugin name="Sofa.Component.ODESolver.Backward"/> <!-- Needed to use components [EulerImplicitSolver] -->
        <RequiredPlugin name="Sofa.Component.SceneUtility"/> <!-- Needed to use components [InfoComponent] -->
        <RequiredPlugin name="Sofa.Component.SolidMechanics.FEM.Elastic"/> <!-- Needed to use components [HexahedronFEMForceField] -->
        <RequiredPlugin name="Sofa.Component.StateContainer"/> <!-- Needed to use components [MechanicalObject] -->
        <RequiredPlugin name="Sofa.Component.Topology.Container.Grid"/> <!-- Needed to use components [RegularGridTopology] -->
        <RequiredPlugin name="Sofa.Component.Visual"/> <!-- Needed to use components [VisualStyle] -->
        <RequiredPlugin name="SofaCUDALinearSolver"/>
    </Node>

    <VisualStyle displayFlags="showBehaviorModels showForceFields" />

    <DefaultAnimationLoop name="animationLoop"/>
    <DefaultVisualManagerLoop name="visualLoop"/>

    <EulerImplicitSolver name="odesolver" rayleighStiffness="0.1" rayleighMass="0.1" />
    <MechanicalObject name="DoFs" />
    <UniformMass name="mass" totalMass="320" />
    <RegularGridTopology name="grid" nx="8" ny="8" nz="40" xmin="-9" xmax="-6" ymin="0" ymax="3" zmin="0" zmax="19" />
    <BoxROI name="box" box="-10 -1 -0.0001  -5 4 0.0001"/>
    <FixedConstraint indices="@box.indices" />
    <HexahedronFEMForceField name="FEM" youngModulus="4000" poissonRatio="0.3" method="large" />
</Node>
