<Node name="root" dt="0.02" gravity="0 -10 0">

    <Node name="plugins">
        <RequiredPlugin name="SofaBoundaryCondition"/>
        <RequiredPlugin name="SofaImplicitOdeSolver"/>
        <RequiredPlugin name="SofaEngine"/>

        <RequiredPlugin name="SofaSimpleFem"/>
        <RequiredPlugin name="SofaSparseSolver"/>
        <RequiredPlugin name="SofaPreconditioner"/>
    </Node>

    <VisualStyle displayFlags="showBehaviorModels showForceFields" />

    <DefaultVisualManagerLoop name="visualLoop"/>

    <FreeMotionAnimationLoop parallelODESolving="true"/>
    <GenericConstraintSolver/>

    <Node name="bar1">

        <EulerImplicitSolver name="odesolver" rayleighStiffness="0.1" rayleighMass="0.1" />
        <MechanicalObject name="DoFs" />
        <UniformMass name="mass" totalMass="320" />
        <RegularGridTopology name="grid" nx="4" ny="4" nz="20" xmin="-9" xmax="-6" ymin="0" ymax="3" zmin="0" zmax="19" />
        <BoxROI name="box" box="-10 -1 -0.0001  -5 4 0.0001"/>
        <FixedConstraint indices="@box.indices" />
        <UncoupledConstraintCorrection />
        <CUDASparseCholeskySolver template="CompressedRowSparseMatrixMat3x3d" permutation="METIS"/>
        <HexahedronFEMForceField name="FEM" youngModulus="4000" poissonRatio="0.3" method="large" />

    </Node>

    <Node name="bar2">

        <EulerImplicitSolver name="odesolver" rayleighStiffness="0.1" rayleighMass="0.1" />
        <MechanicalObject name="DoFs" />
        <UniformMass name="mass" totalMass="320" />
        <RegularGridTopology name="grid" nx="4" ny="4" nz="20" xmin="-9" xmax="-6" ymin="0" ymax="3" zmin="0" zmax="19" />
        <BoxROI name="box" box="-10 -1 -0.0001  -5 4 0.0001"/>
        <FixedConstraint indices="@box.indices" />
        <UncoupledConstraintCorrection />
        <CUDASparseCholeskySolver template="CompressedRowSparseMatrixMat3x3d" permutation="METIS"/>
        <HexahedronFEMForceField name="FEM" youngModulus="8000" poissonRatio="0.3" method="large" />

    </Node>

</Node>
